u(x) := sin(x)^2
data := READPRN("lab2_output.csv")
a := 59.6903
b := 63.3503
xi := data[:, 0]
ui := data[:, 1]
uis := (ui - min(ui))/(2*max(ui))
f(x) :=
    u(x) if a ≤ x ≤ b
    0 otherwise
uis[0] = 0.128198
uis[1] = 0.0428889
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-p*d^2/dx^2(u(x)) + q*u(x) → q*sin(x)^2 - p*(2*cos(x)^2 - 2*sin(x)^2)
N := 9
K := 83
C_p := 120
p(x) := sin(N*x^(mod(K, 4) + 2)) + 2*cos(2*K)*x + C_p
d/dx(p(x)) → 2*cos(166) + 45*x^4*cos(9*x^5)
q(x) := sin(N*x)^2*exp(cos(K*x)) + cos(K*x)^2*atan(x*sin(N*x))^2/(K + 1)
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